W1(p) := 5*(1 + 0.7*p)/(1 + 2.5*p)
W2(p) := 2
W3(p) := 10/(1 + 0.7*p)
50/0.026 = 1923.08
Tи := 0.01
ω0 := 2*π/Tи
Wn(p) := W1(p)*W3(p)/(1 + W1(p)*W2(p))
b0 := -e^(-1.16*Tи) + 1 = 0.011533
a0 := 11
Wnp(p) := (1 - e^(-p*Tи))*Wn(p)/p
a1 := -a0*e^(-1.16*Tи) = -10.8731
c := a1 + 50*b0 = -10.2965
Wpt(p) := 50*b0/(a0*e^(p*Tи) + a1)
c*11 = -113.261
a0 + a1 + 50*b0 = 0.703512
Wpt1(ω) := 50*b0/(a0*e^(1i*ω*Tи) + a1)
Wnp1(ω) := ω0*sum(Wnp(1i*ω - 1i*ω0*l), l = -3 .. 3)/(2*π)
ω := 0.001, 0.01 .. ω0/2
Wnp2(ω) := ω0*sum(Wnp(1i*ω - 1i*ω0*l), l = -∞ .. ∞)/(2*π)
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v := 1 .. 16
n := 0 .. 15
Wnp1(v/16*ω0/2) = [-0.010559 - 0.26766i; -0.0223883 - 0.132661i; -0.0245232 - 0.0868003i; -0.0252006 - 0.0633508i; -0.0254422 - 0.0488816i; -0.0255038 - 0.0389079i; -0.0254765 - 0.0315045i; -0.0254017 - 0.0257065i; -0.0253022 - 0.0209742i; -0.0251925 - 0.0169804i; -0.0250834 - 0.0135121i; -0.0249828 - 0.0104222i; -0.0248971 - 0.007603i; -0.0248311 - 0.00497082i; -0.0247885 - 0.00245671i; -0.0247715 - 1.14604e-7i]
Wpt1(n/15*ω0/2) = [4.54545; -0.0124838 - 0.251519i; -0.0229619 - 0.124656i; -0.0249071 - 0.0815826i; -0.0255876 - 0.0595464i; -0.025902 - 0.0459229i; -0.026072 - 0.0364942i; -0.0261737 - 0.0294481i; -0.0262387 - 0.0238747i; -0.0262822 - 0.0192648i; -0.0263121 - 0.015309i; -0.0263329 - 0.0118057i; -0.0263471 - 0.00861562i; -0.0263564 - 0.00563619i; -0.0263616 - 0.00278697i; -0.0263633]
(a0 - a1)/b0 = 1896.57
50/0.02636 = 1896.81
Given
a0*z + a1 + 50*b0 == 0
Find(z) → 0.936044386982
j := (-a1 - 50*b0)/a0 = 0.936044
Given
a0*(-1) + a1 + k*b0 == 0
Find(k) → 1896.57299076
Given
(-a1 - h*b0)/a0 == -1
Find(h) → 1896.57299076
Given
50/x == 1897
Find(x) → 50/1897
i := 2 .. 1000
y[1] := 0
y[i] := -(a1 + 50*b0)*y[i - 1]/a0 + 50*b0/a0
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j := 2 .. 1000
y[1] := 0
y[j] := -(a1 + 50*b0)*y[j - 1]/a0 + 1897*b0/a0
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